# OpenSim document version 40000
Model Exoarm:
  gravity: 0 -9.81 0
  Ground
  BodySet:
    Body upperarm: mass=2 [kg] mass_center=(0 0 0) inertia=(0.05 0.05 0.05 0 0 0)
      Cylinder upperarm_geom_1: radius=0.04 half_height=0.15
    Body arm_ring: mass=0.1 mass_center=(0 0 0) inertia=(0.001 0.001 0.001 0 0 0)
      Cylinder arm_ring_geom_1: radius=0.045 half_height=0.02
    Body forearm: mass=1.5 mass_center=(0 0 0) inertia=(0.05 0.05 0.05 0 0 0)
      Cylinder forearm_geom_1: radius=0.04 half_height=0.15
    Body forearm_ring_start: mass=0.05 mass_center=(0 0 0) inertia=(0.0005 0.0005 0.0005 0 0 0)
      Cylinder forearm_ring_start_geom_1: radius=0.045 half_height=0.01
    Body forearm_ring_end: mass=0.05 mass_center=(0 0 0) inertia=(0.0005 0.0005 0.0005 0 0 0)
      Cylinder forearm_ring_end_geom_1: radius=0.045 half_height=0.01
    Body thumb: mass=0.2 mass_center=(0 0 0) inertia=(0.001 0.001 0.001 0 0 0)
      Cylinder thumb_geom_1: radius=0.01 half_height=0.03
    Body finger: mass=0.2 mass_center=(0 0 0) inertia=(0.001 0.001 0.001 0 0 0)
      Cylinder finger_geom_1: radius=0.01 half_height=0.045
    Body thumb_ring: mass=0.02 mass_center=(0 0 0) inertia=(0.0002 0.0002 0.0002 0 0 0)
      Cylinder thumb_ring_geom_1: radius=0.015 half_height=0.005
    Body finger_ring: mass=0.02 mass_center=(0 0 0) inertia=(0.0002 0.0002 0.0002 0 0 0)
      Cylinder finger_ring_geom_1: radius=0.015 half_height=0.005
  JointSet:
    WeldJoint shoulder_joint: socket_parent_frame=ground_offset socket_child_frame=upperarm_offset
      PhysicalOffsetFrame ground_offset: socket_parent=/ground translation=(0 0.9 0) [meters]
      PhysicalOffsetFrame upperarm_offset: socket_parent=/bodyset/upperarm translation=(0 0.15 0)
    WeldJoint arm_ring_joint: socket_parent_frame=upperarm_offset socket_child_frame=arm_ring_offset
      PhysicalOffsetFrame upperarm_offset: socket_parent=/bodyset/upperarm translation=(0 0.09 0)
      PhysicalOffsetFrame arm_ring_offset: socket_parent=/bodyset/arm_ring translation=(0 0 0)
    PinJoint elbow_joint: socket_parent_frame=upperarm_offset socket_child_frame=forearm_offset
      Coordinate elbow_flex: default_value=-2.617994 range=(-2.617994 -0.5235988) locked=true
      PhysicalOffsetFrame upperarm_offset: socket_parent=/bodyset/upperarm translation=(0 -0.15 0)
      PhysicalOffsetFrame forearm_offset: socket_parent=/bodyset/forearm translation=(0 -0.15 0)
    WeldJoint forearm_ring_start_joint: socket_parent_frame=forearm_offset socket_child_frame=forearm_ring_start_offset
      PhysicalOffsetFrame forearm_offset: socket_parent=/bodyset/forearm translation=(0 -0.08 0)
      PhysicalOffsetFrame forearm_ring_start_offset: socket_parent=/bodyset/forearm_ring_start translation=(0 0 0)
    WeldJoint forearm_ring_end_joint: socket_parent_frame=forearm_offset socket_child_frame=forearm_ring_end_offset
      PhysicalOffsetFrame forearm_offset: socket_parent=/bodyset/forearm translation=(0 0.15 0)
      PhysicalOffsetFrame forearm_ring_end_offset: socket_parent=/bodyset/forearm_ring_end translation=(0 0 0)
    PinJoint thumb_joint: socket_parent_frame=forearm_offset socket_child_frame=thumb_offset
      Coordinate thumb_flex: default_value=0 range=(-1.570796 0.5235988)
      PhysicalOffsetFrame forearm_offset: socket_parent=/bodyset/forearm translation=(-0.04 0.18 0)
      PhysicalOffsetFrame thumb_offset: socket_parent=/bodyset/thumb translation=(0 0 0)
          orientation=(0 1.570796 0) [radians]
    PinJoint finger_joint: socket_parent_frame=forearm_offset socket_child_frame=finger_offset
      Coordinate finger_flex: default_value=0 range=(-1.570796 0.5235988)
      PhysicalOffsetFrame forearm_offset: socket_parent=/bodyset/forearm translation=(0 0.19 0.04)
          orientation=(0 1.570796 0)
      PhysicalOffsetFrame finger_offset: socket_parent=/bodyset/finger translation=(0 0 0)
    WeldJoint thumb_ring_joint: socket_parent_frame=thumb_offset socket_child_frame=thumb_ring_offset
      PhysicalOffsetFrame thumb_offset: socket_parent=/bodyset/thumb translation=(0 0.029 0)
      PhysicalOffsetFrame thumb_ring_offset: socket_parent=/bodyset/thumb_ring translation=(0 0 0)
    WeldJoint finger_ring_joint: socket_parent_frame=finger_offset socket_child_frame=finger_ring_offset
      PhysicalOffsetFrame finger_offset: socket_parent=/bodyset/finger translation=(0 0.044 0)
      PhysicalOffsetFrame finger_ring_offset: socket_parent=/bodyset/finger_ring translation=(0 0 0)
  ControllerSet:
    PrescribedController cable_controller: actuator_list=upper_to_forearm_cable
      FunctionSet ControlFunctions: Constant(value=1)
    PrescribedController elbow_damping_controller: actuator_list=elbow_damper
      FunctionSet ControlFunctions: Constant(value=-0.5)
    PrescribedController finger_cable_controller: actuator_list=(thumb_cable finger_cable)
      FunctionSet ControlFunctions: Constant(value=1) Constant(value=1)
  ForceSet:
    PathActuator upper_to_forearm_cable: min_control=0 max_control=1 optimal_force=48
      PathPoint origin: arm_ring (0.045 0 0)
      PathPoint insertion: forearm_ring_start (-0.045 0 0)
    CoordinateActuator elbow_damper: min_control=-50 max_control=50 coordinate=elbow_flex optimal_force=1
    PathActuator thumb_cable: min_control=0 max_control=1 optimal_force=0.1
      PathPoint thumb_start: thumb (0 0.03 0)
      PathPoint thumb_end: forearm_ring_end (0 0 0)
    PathActuator finger_cable: min_control=0 max_control=1 optimal_force=0.1
      PathPoint finger_start: finger (0 0.045 0)
      PathPoint finger_end: forearm_ring_end (0 0.01 0)
